# Antal af huller på hver bremseskive
FSH5 := 48
BSH5 := 56
SH6 := 56
# Diameteren af bremseskiverne
FSD5 := 224 mm
BSD5 := 230 mm
SD6 := 222 mm
# Omkredsen af bremseskiverne
FSO5 := FSD5*π = 0.703717 m
BSO5 := BSD5*π = 0.722566 m
SO6 := SD6*π = 0.697434 m
# Afstand tilbage lagt pr hul
FSPH5 := FSO5/FSH5 = 0.0146608 m
BSPH5 := BSO5/BSH5 = 0.012903 m
SPH6 := SO6/SH6 = 0.0124542 m
# Teoretisk test fart ved brug af frekvens pr hul
# Test frekvens
tf := 350*Hz
VFbil5 := FSPH5*tf = 18.4726 km/hr
Vbil6 := SPH6*tf = 15.6923 km/hr
# Teoretisk måling af hastighed i graf
VFbil5(fz) := FSPH5*fz*Hz
Vbil6(fz) := SPH6*fz*Hz
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